# OpenSim document version 30000
Model melosim-gmYHEX:
  BodySet:
    Body pelvis: mass=11.777 mass_center=(-0.0707 0 0) inertia=(0.1028 0.0871 0.0579 0 0 0)
      CustomJoint custom_joint: parent_body=ground location_in_parent=(0 0 0) location_in_child=(0 0 0)
          orientation_in_child=(0 0 0)
        Coordinate pelvis_tilt: range_min=-1.570796 range_max=1.570796 clamped=true
        Coordinate pelvis_list: range_min=-1.570796 range_max=1.570796 clamped=true
        Coordinate pelvis_rotation: range_min=-1.570796 range_max=1.570796 clamped=true
        Coordinate pelvis_tx: range_min=-5 range_max=5 clamped=true
        Coordinate pelvis_ty: range_min=-1 range_max=2 clamped=true
        Coordinate pelvis_tz: range_min=-3 range_max=3 clamped=true
        SpatialTransform:
          rotation_x: CoordinateEffect: coordinate=pelvis_tilt LinearFunction(slope=1, intercept=0)
          rotation_y: CoordinateEffect: coordinate=pelvis_list LinearFunction(slope=1, intercept=0)
          rotation_z: CoordinateEffect: coordinate=pelvis_rotation LinearFunction(slope=1, intercept=0)
          translation_x: CoordinateEffect: coordinate=pelvis_tx LinearFunction(slope=1, intercept=0)
          translation_y: CoordinateEffect: coordinate=pelvis_ty LinearFunction(slope=1, intercept=0)
          translation_z: CoordinateEffect: coordinate=pelvis_tz LinearFunction(slope=1, intercept=0)
    Body femur_r: mass=9.3014 mass_center=(0 -0.17 0) inertia=(0.1339 0.0351 0.1412 0 0 0)
      CustomJoint custom_joint: parent_body=pelvis location_in_parent=(0 0 0) location_in_child=(0 0 0)
          orientation_in_child=(0 0 0)
        Coordinate hip_flexion_r: range_min=-0.5235988 range_max=2.094395 clamped=true
        Coordinate hip_adduction_r: range_min=-0.8726646 range_max=0.5235988 clamped=true
        Coordinate hip_rotation_r: range_min=-0.6981317 range_max=0.6981317 clamped=true
        SpatialTransform:
          rotation_x: CoordinateEffect: coordinate=hip_flexion_r LinearFunction(slope=1, intercept=0)
          rotation_y: CoordinateEffect: coordinate=hip_adduction_r LinearFunction(slope=1, intercept=0)
          rotation_z: CoordinateEffect: coordinate=hip_rotation_r LinearFunction(slope=1, intercept=0)
          translation_x: CoordinateEffect: NullFunction()
          translation_y: CoordinateEffect: NullFunction()
          translation_z: CoordinateEffect: NullFunction()
    Body tibia_r: mass=3.7075 mass_center=(0 -0.1867 0) inertia=(0.0504 0.0051 0.0511 0 0 0)
      CustomJoint custom_joint: parent_body=femur_r location_in_parent=(0 0 0) location_in_child=(0 0 0)
          orientation_in_child=(0 0 0)
        Coordinate knee_angle_r: range_min=0 range_max=2.0944 clamped=true
        SpatialTransform:
          rotation_x: CoordinateEffect: coordinate=knee_angle_r LinearFunction(slope=1, intercept=0)
          rotation_y: CoordinateEffect: coordinate=knee_angle_r
            PolynomialFunction: coefficients=(0 0 0.174533 0.0126809 0.349066 0.0226969 0.523599 0.0296054 0.698132 0.0332049 0.872665 0.0335354 1.0472 0.0308779 1.22173 0.0257548 1.39626 0.0189295 1.5708 0.011407 1.74533 0.00443314 1.91986 -0.00050475 2.0944 -0.0016782)
          rotation_z: CoordinateEffect: coordinate=knee_angle_r
            PolynomialFunction: coefficients=(0 0 0.174533 0.059461 0.349066 0.109399 0.523599 0.150618 0.698132 0.18392 0.872665 0.210107 1.0472 0.229983 1.22173 0.24435 1.39626 0.254012 1.5708 0.25977 1.74533 0.262428 1.91986 0.262788 2.0944 0.261654)
          translation_x: CoordinateEffect: coordinate=knee_angle_r
            PolynomialFunction: coefficients=(0 0 0.174533 0.000479 0.349066 0.000835 0.523599 0.001086 0.698132 0.001251 0.872665 0.001346 1.0472 0.001391 1.22173 0.001403 1.39626 0.0014 1.5708 0.0014 1.74533 0.001421 1.91986 0.001481 2.0944 0.001599)
          translation_y: CoordinateEffect: coordinate=knee_angle_r
            PolynomialFunction: coefficients=(0 0 0.174533 0.000988 0.349066 0.001899 0.523599 0.002734 0.698132 0.003492 0.872665 0.004173 1.0472 0.004777 1.22173 0.005305 1.39626 0.005756 1.5708 0.00613 1.74533 0.006427 1.91986 0.006648 2.0944 0.006792)
          translation_z: CoordinateEffect: NullFunction()
    Body patella_r: mass=0.0862 mass_center=(0.0018 0.0264 0) inertia=(0.00000287 0.00001311 0.00001311 0 0 0)
      CustomJoint custom_joint: parent_body=femur_r location_in_parent=(0 0 0) location_in_child=(0 0 0)
          orientation_in_child=(0 0 0)
        Coordinate knee_angle_r_beta: clamped=false
        SpatialTransform:
          rotation_x: CoordinateEffect: coordinate=knee_angle_r_beta
            PolynomialFunction: coefficients=(0 0.00113686 0.174533 -0.00629212 0.349066 -0.105582 0.523599 -0.253683 0.698132 -0.414245 0.872665 -0.579047 1.0472 -0.747244 1.22173 -0.91799 1.39626 -1.09044 1.5708 -1.26379 1.74533 -1.43763 1.91986 -1.61186 2.0944 -1.78634)
          rotation_y: CoordinateEffect: NullFunction()
          rotation_z: CoordinateEffect: NullFunction()
          translation_x: CoordinateEffect: coordinate=knee_angle_r_beta
            PolynomialFunction: coefficients=(0 0.0524 0.174533 0.0488 0.349066 0.0437 0.523599 0.0371 0.698132 0.0296 0.872665 0.0216 1.0472 0.0136 1.22173 0.0057 1.39626 -0.0019 1.5708 -0.0088 1.74533 -0.0148 1.91986 -0.0196 2.0944 -0.0227)
          translation_y: CoordinateEffect: coordinate=knee_angle_r_beta
            PolynomialFunction: coefficients=(0 -0.0108 0.174533 -0.019 0.349066 -0.0263 0.523599 -0.0322 0.698132 -0.0367 0.872665 -0.0395 1.0472 -0.0408 1.22173 -0.0404 1.39626 -0.0384 1.5708 -0.0349 1.74533 -0.0301 1.91986 -0.0245 2.0944 -0.0187)
          translation_z: CoordinateEffect: NullFunction()
    Body talus_r: mass=0.1 mass_center=(0 0 0) inertia=(0.001 0.001 0.001 0 0 0)
      PinJoint hinge_joint: parent_body=tibia_r location_in_parent=(0 0 0) location_in_child=(0 0 0)
          orientation_in_child=(0 0 0)
        Coordinate hinge_coord: axis=(0 0 1) range_min=-0.6981317 range_max=0.5235988
    Body calcn_r: mass=1.25 mass_center=(0.1 0.03 0) inertia=(0.0014 0.0039 0.0041 0 0 0)
      PinJoint hinge_joint: parent_body=talus_r location_in_parent=(0 0 0) location_in_child=(0 0 0)
          orientation_in_child=(0 0 0)
        Coordinate hinge_coord: axis=(0 0 1) range_min=-0.3490659 range_max=0.3490659
    Body toes_r: mass=0.2166 mass_center=(0.0346 0.006 -0.0175) inertia=(0.0001 0.0002 0.001 0 0 0)
      PinJoint hinge_joint: parent_body=calcn_r location_in_parent=(0 0 0) location_in_child=(0 0 0)
          orientation_in_child=(0 0 0)
        Coordinate hinge_coord: axis=(0 0 1) range_min=-0.5235988 range_max=0.5235988
    Body femur_l: mass=9.3014 mass_center=(0 -0.17 0) inertia=(0.1339 0.0351 0.1412 0 0 0)
      CustomJoint custom_joint: parent_body=pelvis location_in_parent=(0 0 0) location_in_child=(0 0 0)
          orientation_in_child=(0 0 0)
        Coordinate hip_flexion_l: range_min=-0.5235988 range_max=2.094395 clamped=true
        Coordinate hip_adduction_l: range_min=-0.8726646 range_max=0.5235988 clamped=true
        Coordinate hip_rotation_l: range_min=-0.6981317 range_max=0.6981317 clamped=true
        SpatialTransform:
          rotation_x: CoordinateEffect: coordinate=hip_flexion_l LinearFunction(slope=1, intercept=0)
          rotation_y: CoordinateEffect: coordinate=hip_adduction_l LinearFunction(slope=-1, intercept=0)
          rotation_z: CoordinateEffect: coordinate=hip_rotation_l LinearFunction(slope=-1, intercept=0)
          translation_x: CoordinateEffect: NullFunction()
          translation_y: CoordinateEffect: NullFunction()
          translation_z: CoordinateEffect: NullFunction()
    Body tibia_l: mass=3.7075 mass_center=(0 -0.1867 0) inertia=(0.0504 0.0051 0.0511 0 0 0)
      CustomJoint custom_joint: parent_body=femur_l location_in_parent=(0 0 0) location_in_child=(0 0 0)
          orientation_in_child=(0 0 0)
        Coordinate knee_angle_l: range_min=0 range_max=2.0944 clamped=true
        SpatialTransform:
          rotation_x: CoordinateEffect: coordinate=knee_angle_l LinearFunction(slope=1, intercept=0)
          rotation_y: CoordinateEffect: coordinate=knee_angle_l
            PolynomialFunction: coefficients=(0 0 0.174533 0.0126809 0.349066 0.0226969 0.523599 0.0296054 0.698132 0.0332049 0.872665 0.0335354 1.0472 0.0308779 1.22173 0.0257548 1.39626 0.0189295 1.5708 0.011407 1.74533 0.00443314 1.91986 -0.00050475 2.0944 -0.0016782)
          rotation_z: CoordinateEffect: coordinate=knee_angle_l
            PolynomialFunction: coefficients=(0 0 0.174533 -0.059461 0.349066 -0.109399 0.523599 -0.150618 0.698132 -0.18392 0.872665 -0.210107 1.0472 -0.229983 1.22173 -0.24435 1.39626 -0.254012 1.5708 -0.25977 1.74533 -0.262428 1.91986 -0.262788 2.0944 -0.261654)
          translation_x: CoordinateEffect: coordinate=knee_angle_l
            PolynomialFunction: coefficients=(0 0 0.174533 0.000479 0.349066 0.000835 0.523599 0.001086 0.698132 0.001251 0.872665 0.001346 1.0472 0.001391 1.22173 0.001403 1.39626 0.0014 1.5708 0.0014 1.74533 0.001421 1.91986 0.001481 2.0944 0.001599)
          translation_y: CoordinateEffect: coordinate=knee_angle_l
            PolynomialFunction: coefficients=(0 0 0.174533 -0.000988 0.349066 -0.001899 0.523599 -0.002734 0.698132 -0.003492 0.872665 -0.004173 1.0472 -0.004777 1.22173 -0.005305 1.39626 -0.005756 1.5708 -0.00613 1.74533 -0.006427 1.91986 -0.006648 2.0944 -0.006792)
          translation_z: CoordinateEffect: NullFunction()
    Body patella_l: mass=0.0862 mass_center=(0.0018 0.0264 0) inertia=(0.00000287 0.00001311 0.00001311 0 0 0)
      CustomJoint custom_joint: parent_body=femur_l location_in_parent=(0 0 0) location_in_child=(0 0 0)
          orientation_in_child=(0 0 0)
        Coordinate knee_angle_l_beta: clamped=false
        SpatialTransform:
          rotation_x: CoordinateEffect: coordinate=knee_angle_l_beta
            PolynomialFunction: coefficients=(0 0.00113686 0.174533 -0.00629212 0.349066 -0.105582 0.523599 -0.253683 0.698132 -0.414245 0.872665 -0.579047 1.0472 -0.747244 1.22173 -0.91799 1.39626 -1.09044 1.5708 -1.26379 1.74533 -1.43763 1.91986 -1.61186 2.0944 -1.78634)
          rotation_y: CoordinateEffect: NullFunction()
          rotation_z: CoordinateEffect: NullFunction()
          translation_x: CoordinateEffect: coordinate=knee_angle_l_beta
            PolynomialFunction: coefficients=(0 0.0524 0.174533 0.0488 0.349066 0.0437 0.523599 0.0371 0.698132 0.0296 0.872665 0.0216 1.0472 0.0136 1.22173 0.0057 1.39626 -0.0019 1.5708 -0.0088 1.74533 -0.0148 1.91986 -0.0196 2.0944 -0.0227)
          translation_y: CoordinateEffect: coordinate=knee_angle_l_beta
            PolynomialFunction: coefficients=(0 -0.0108 0.174533 -0.019 0.349066 -0.0263 0.523599 -0.0322 0.698132 -0.0367 0.872665 -0.0395 1.0472 -0.0408 1.22173 -0.0404 1.39626 -0.0384 1.5708 -0.0349 1.74533 -0.0301 1.91986 -0.0245 2.0944 -0.0187)
          translation_z: CoordinateEffect: NullFunction()
    Body talus_l: mass=0.1 mass_center=(0 0 0) inertia=(0.001 0.001 0.001 0 0 0)
      PinJoint hinge_joint: parent_body=tibia_l location_in_parent=(0 0 0) location_in_child=(0 0 0)
          orientation_in_child=(0 0 0)
        Coordinate hinge_coord: axis=(0 0 1) range_min=-0.6981317 range_max=0.5235988
    Body calcn_l: mass=1.25 mass_center=(0.1 0.03 0) inertia=(0.0014 0.0039 0.0041 0 0 0)
      PinJoint hinge_joint: parent_body=talus_l location_in_parent=(0 0 0) location_in_child=(0 0 0)
          orientation_in_child=(0 0 0)
        Coordinate hinge_coord: axis=(0 0 1) range_min=-0.3490659 range_max=0.3490659
    Body toes_l: mass=0.2166 mass_center=(0.0346 0.006 0.0175) inertia=(0.0001 0.0002 0.001 0 0 0)
      PinJoint hinge_joint: parent_body=calcn_l location_in_parent=(0 0 0) location_in_child=(0 0 0)
          orientation_in_child=(0 0 0)
        Coordinate hinge_coord: axis=(0 0 1) range_min=-0.5235988 range_max=0.5235988
    Body torso: mass=26.8266 mass_center=(-0.03 0.32 0) inertia=(1.4745 0.7555 1.4314 0 0 0)
      CustomJoint custom_joint: parent_body=pelvis location_in_parent=(0 0 0) location_in_child=(0 0 0)
          orientation_in_child=(0 0 0)
        Coordinate lumbar_extension: range_min=-1.570796 range_max=1.570796 clamped=true
        Coordinate lumbar_bending: range_min=-1.570796 range_max=1.570796 clamped=true
        Coordinate lumbar_rotation: range_min=-1.570796 range_max=1.570796 clamped=true
        SpatialTransform:
          rotation_x: CoordinateEffect: coordinate=lumbar_extension LinearFunction(slope=1, intercept=0)
          rotation_y: CoordinateEffect: coordinate=lumbar_bending LinearFunction(slope=1, intercept=0)
          rotation_z: CoordinateEffect: coordinate=lumbar_rotation LinearFunction(slope=1, intercept=0)
          translation_x: CoordinateEffect: NullFunction()
          translation_y: CoordinateEffect: NullFunction()
          translation_z: CoordinateEffect: NullFunction()
    Body humerus_r: mass=2.0325 mass_center=(0 -0.164502 0) inertia=(0.011946 0.004121 0.013409 0 0 0)
      CustomJoint custom_joint: parent_body=torso location_in_parent=(0 0 0) location_in_child=(0 0 0)
          orientation_in_child=(0 0 0)
        Coordinate arm_flex_r: range_min=-1.570796 range_max=1.570796 clamped=true
        Coordinate arm_add_r: range_min=-2.094395 range_max=1.570796 clamped=true
        Coordinate arm_rot_r: range_min=-1.570796 range_max=1.570796 clamped=true
        SpatialTransform:
          rotation_x: CoordinateEffect: coordinate=arm_flex_r LinearFunction(slope=1, intercept=0)
          rotation_y: CoordinateEffect: coordinate=arm_add_r LinearFunction(slope=1, intercept=0)
          rotation_z: CoordinateEffect: coordinate=arm_rot_r LinearFunction(slope=1, intercept=0)
          translation_x: CoordinateEffect: NullFunction()
          translation_y: CoordinateEffect: NullFunction()
          translation_z: CoordinateEffect: NullFunction()
    Body ulna_r: mass=0.6075 mass_center=(0 -0.120525 0) inertia=(0.002962 0.000618 0.003213 0 0 0)
      PinJoint hinge_joint: parent_body=humerus_r location_in_parent=(0 0 0) location_in_child=(0 0 0)
          orientation_in_child=(0 0 0)
        Coordinate hinge_coord: axis=(0 0 1) range_min=0 range_max=2.618
    Body radius_r: mass=0.6075 mass_center=(0 -0.120525 0) inertia=(0.002962 0.000618 0.003213 0 0 0)
      PinJoint hinge_joint: parent_body=ulna_r location_in_parent=(0 0 0) location_in_child=(0 0 0)
          orientation_in_child=(0 0 0)
        Coordinate hinge_coord: axis=(0 0 1) range_min=0 range_max=1.570796
    Body hand_r: mass=0.4575 mass_center=(0 -0.068095 0) inertia=(0.000892 0.000547 0.00134 0 0 0)
      UniversalJoint universal_joint: parent_body=radius_r location_in_parent=(0 0 0) location_in_child=(0 0 0)
          orientation_in_child=(0 0 0)
    Body humerus_l: mass=2.0325 mass_center=(0 -0.164502 0) inertia=(0.011946 0.004121 0.013409 0 0 0)
      CustomJoint custom_joint: parent_body=torso location_in_parent=(0 0 0) location_in_child=(0 0 0)
          orientation_in_child=(0 0 0)
        Coordinate arm_flex_l: range_min=-1.570796 range_max=1.570796 clamped=true
        Coordinate arm_add_l: range_min=-2.094395 range_max=1.570796 clamped=true
        Coordinate arm_rot_l: range_min=-1.570796 range_max=1.570796 clamped=true
        SpatialTransform:
          rotation_x: CoordinateEffect: coordinate=arm_flex_l LinearFunction(slope=1, intercept=0)
          rotation_y: CoordinateEffect: coordinate=arm_add_l LinearFunction(slope=1, intercept=0)
          rotation_z: CoordinateEffect: coordinate=arm_rot_l LinearFunction(slope=1, intercept=0)
          translation_x: CoordinateEffect: NullFunction()
          translation_y: CoordinateEffect: NullFunction()
          translation_z: CoordinateEffect: NullFunction()
    Body ulna_l: mass=0.6075 mass_center=(0 -0.120525 0) inertia=(0.002962 0.000618 0.003213 0 0 0)
      PinJoint hinge_joint: parent_body=humerus_l location_in_parent=(0 0 0) location_in_child=(0 0 0)
          orientation_in_child=(0 0 0)
        Coordinate hinge_coord: axis=(0 0 1) range_min=0 range_max=2.618
    Body radius_l: mass=0.6075 mass_center=(0 -0.120525 0) inertia=(0.002962 0.000618 0.003213 0 0 0)
      PinJoint hinge_joint: parent_body=ulna_l location_in_parent=(0 0 0) location_in_child=(0 0 0)
          orientation_in_child=(0 0 0)
        Coordinate hinge_coord: axis=(0 0 1) range_min=0 range_max=1.570796
    Body hand_l: mass=0.4575 mass_center=(0 -0.068095 0) inertia=(0.000892 0.000547 0.00134 0 0 0)
      UniversalJoint universal_joint: parent_body=radius_l location_in_parent=(0 0 0) location_in_child=(0 0 0)
          orientation_in_child=(0 0 0)
  ForceSet:
    Millard2012EquilibriumMuscle [values shared by the 80 below unless stated]: max_isometric_force=0
        optimal_fiber_length=0 tendon_slack_length=0 pennation_angle_at_optimal=0 max_contraction_velocity=10
        activation_time_constant=0.01 deactivation_time_constant=0.04 minimum_activation=0.01 fiber_damping=0.1
    Millard2012EquilibriumMuscle addbrev_r
    Millard2012EquilibriumMuscle addlong_r
    Millard2012EquilibriumMuscle addmagDist_r
    Millard2012EquilibriumMuscle addmagIsch_r
    Millard2012EquilibriumMuscle addmagMid_r
    Millard2012EquilibriumMuscle addmagProx_r
    Millard2012EquilibriumMuscle bflh_r
    Millard2012EquilibriumMuscle bfsh_r
    Millard2012EquilibriumMuscle edl_r
    Millard2012EquilibriumMuscle ehl_r
    Millard2012EquilibriumMuscle fdl_r
    Millard2012EquilibriumMuscle fhl_r
    Millard2012EquilibriumMuscle gaslat_r
    Millard2012EquilibriumMuscle gasmed_r
    Millard2012EquilibriumMuscle glmax1_r
    Millard2012EquilibriumMuscle glmax2_r
    Millard2012EquilibriumMuscle glmax3_r
    Millard2012EquilibriumMuscle glmed1_r
    Millard2012EquilibriumMuscle glmed2_r
    Millard2012EquilibriumMuscle glmed3_r
    Millard2012EquilibriumMuscle glmin1_r
    Millard2012EquilibriumMuscle glmin2_r
    Millard2012EquilibriumMuscle glmin3_r
    Millard2012EquilibriumMuscle grac_r
    Millard2012EquilibriumMuscle iliacus_r
    Millard2012EquilibriumMuscle perbrev_r
    Millard2012EquilibriumMuscle perlong_r
    Millard2012EquilibriumMuscle piri_r
    Millard2012EquilibriumMuscle psoas_r
    Millard2012EquilibriumMuscle recfem_r
    Millard2012EquilibriumMuscle sart_r
    Millard2012EquilibriumMuscle semimem_r
    Millard2012EquilibriumMuscle semiten_r
    Millard2012EquilibriumMuscle soleus_r
    Millard2012EquilibriumMuscle tfl_r
    Millard2012EquilibriumMuscle tibant_r
    Millard2012EquilibriumMuscle tibpost_r
    Millard2012EquilibriumMuscle vasint_r
    Millard2012EquilibriumMuscle vaslat_r
    Millard2012EquilibriumMuscle vasmed_r
    Millard2012EquilibriumMuscle addbrev_l
    Millard2012EquilibriumMuscle addlong_l
    Millard2012EquilibriumMuscle addmagDist_l
    Millard2012EquilibriumMuscle addmagIsch_l
    Millard2012EquilibriumMuscle addmagMid_l
    Millard2012EquilibriumMuscle addmagProx_l
    Millard2012EquilibriumMuscle bflh_l
    Millard2012EquilibriumMuscle bfsh_l
    Millard2012EquilibriumMuscle edl_l
    Millard2012EquilibriumMuscle ehl_l
    Millard2012EquilibriumMuscle fdl_l
    Millard2012EquilibriumMuscle fhl_l
    Millard2012EquilibriumMuscle gaslat_l
    Millard2012EquilibriumMuscle gasmed_l
    Millard2012EquilibriumMuscle glmax1_l
    Millard2012EquilibriumMuscle glmax2_l
    Millard2012EquilibriumMuscle glmax3_l
    Millard2012EquilibriumMuscle glmed1_l
    Millard2012EquilibriumMuscle glmed2_l
    Millard2012EquilibriumMuscle glmed3_l
    Millard2012EquilibriumMuscle glmin1_l
    Millard2012EquilibriumMuscle glmin2_l
    Millard2012EquilibriumMuscle glmin3_l
    Millard2012EquilibriumMuscle grac_l
    Millard2012EquilibriumMuscle iliacus_l
    Millard2012EquilibriumMuscle perbrev_l
    Millard2012EquilibriumMuscle perlong_l
    Millard2012EquilibriumMuscle piri_l
    Millard2012EquilibriumMuscle psoas_l
    Millard2012EquilibriumMuscle recfem_l
    Millard2012EquilibriumMuscle sart_l
    Millard2012EquilibriumMuscle semimem_l
    Millard2012EquilibriumMuscle semiten_l
    Millard2012EquilibriumMuscle soleus_l
    Millard2012EquilibriumMuscle tfl_l
    Millard2012EquilibriumMuscle tibant_l
    Millard2012EquilibriumMuscle tibpost_l
    Millard2012EquilibriumMuscle vasint_l
    Millard2012EquilibriumMuscle vaslat_l
    Millard2012EquilibriumMuscle vasmed_l
    CoordinateActuator [values shared by the 17 below unless stated]: optimal_force=10 min_control=-1 max_control=1
    CoordinateActuator lumbar_ext: coordinate=lumbar_extension
    CoordinateActuator lumbar_bend: coordinate=lumbar_bending
    CoordinateActuator lumbar_rot: coordinate=lumbar_rotation
    CoordinateActuator shoulder_flex_r: coordinate=arm_flex_r
    CoordinateActuator shoulder_add_r: coordinate=arm_add_r
    CoordinateActuator shoulder_rot_r: coordinate=arm_rot_r
    CoordinateActuator elbow_flex_r: coordinate=elbow_flex_r
    CoordinateActuator pro_sup_r: coordinate=pro_sup_r
    CoordinateActuator wrist_flex_r: coordinate=wrist_flex_r
    CoordinateActuator wrist_dev_r: coordinate=wrist_dev_r
    CoordinateActuator shoulder_flex_l: coordinate=arm_flex_l
    CoordinateActuator shoulder_add_l: coordinate=arm_add_l
    CoordinateActuator shoulder_rot_l: coordinate=arm_rot_l
    CoordinateActuator elbow_flex_l: coordinate=elbow_flex_l
    CoordinateActuator pro_sup_l: coordinate=pro_sup_l
    CoordinateActuator wrist_flex_l: coordinate=wrist_flex_l
    CoordinateActuator wrist_dev_l: coordinate=wrist_dev_l
  MarkerSet:
    Marker RACR: torso (0 0 0) fixed=true
    Marker LACR: torso (0 0 0) fixed=true
    Marker C7: torso (0 0 0) fixed=true
    Marker CLAV: torso (0 0 0) fixed=true
    Marker RASH: torso (0 0 0) fixed=true
    Marker RPSH: torso (0 0 0) fixed=true
    Marker LASH: torso (0 0 0) fixed=true
    Marker LPSH: torso (0 0 0) fixed=true
    Marker RSJC: humerus_r (0 0 0) fixed=true
    Marker RUA1: humerus_r (0 0 0) fixed=true
    Marker RUA2: humerus_r (0 0 0) fixed=true
    Marker RUA3: humerus_r (0 0 0) fixed=true
    Marker RLEL: humerus_r (0 0 0) fixed=true
    Marker RMEL: humerus_r (0 0 0) fixed=true
    Marker RFAsuperior: ulna_r (0 0 0) fixed=true
    Marker RFAradius: radius_r (0 0 0) fixed=true
    Marker RFAulna: radius_r (0 0 0) fixed=true
    Marker LSJC: humerus_l (0 0 0) fixed=true
    Marker LUA1: humerus_l (0 0 0) fixed=true
    Marker LUA2: humerus_l (0 0 0) fixed=true
    Marker LUA3: humerus_l (0 0 0) fixed=true
    Marker LLEL: humerus_l (0 0 0) fixed=true
    Marker LMEL: humerus_l (0 0 0) fixed=true
    Marker LFAsuperior: ulna_l (0 0 0) fixed=true
    Marker LFAradius: radius_l (0 0 0) fixed=true
    Marker LFAulna: radius_l (0 0 0) fixed=true
    Marker RASI: pelvis (0 0 0) fixed=true
    Marker LASI: pelvis (0 0 0) fixed=true
    Marker RPSI: pelvis (0 0 0) fixed=true
    Marker LPSI: pelvis (0 0 0) fixed=true
    Marker LHJC: femur_l (0 0 0) fixed=true
    Marker RHJC: femur_r (0 0 0) fixed=true
    Marker RTH1: femur_r (0 0 0) fixed=true
    Marker RTH2: femur_r (0 0 0) fixed=true
    Marker RTH3: femur_r (0 0 0) fixed=true
    Marker RLFC: femur_r (0 0 0) fixed=true
    Marker RMFC: femur_r (0 0 0) fixed=true
    Marker RKJC: tibia_r (0 0 0) fixed=true
    Marker RTB1: tibia_r (0 0 0) fixed=true
    Marker RTB2: tibia_r (0 0 0) fixed=true
    Marker RTB3: tibia_r (0 0 0) fixed=true
    Marker RLMAL: tibia_r (0 0 0) fixed=true
    Marker RMMAL: tibia_r (0 0 0) fixed=true
    Marker RAJC: talus_r (0 0 0) fixed=true
    Marker RCAL: calcn_r (0 0 0) fixed=true
    Marker RTOE: calcn_r (0 0 0) fixed=true
    Marker RMT5: calcn_r (0 0 0) fixed=true
    Marker LTH1: femur_l (0 0 0) fixed=true
    Marker LTH2: femur_l (0 0 0) fixed=true
    Marker LTH3: femur_l (0 0 0) fixed=true
    Marker LLFC: femur_l (0 0 0) fixed=true
    Marker LMFC: femur_l (0 0 0) fixed=true
    Marker LKJC: tibia_l (0 0 0) fixed=true
    Marker LTB1: tibia_l (0 0 0) fixed=true
    Marker LTB2: tibia_l (0 0 0) fixed=true
    Marker LTB3: tibia_l (0 0 0) fixed=true
    Marker LLMAL: tibia_l (0 0 0) fixed=true
    Marker LMMAL: tibia_l (0 0 0) fixed=true
    Marker LAJC: talus_l (0 0 0) fixed=true
    Marker LCAL: calcn_l (0 0 0) fixed=true
    Marker LTOE: calcn_l (0 0 0) fixed=true
    Marker LMT5: calcn_l (0 0 0) fixed=true
    Marker REJC: ulna_r (0 0 0) fixed=true
    Marker LEJC: ulna_l (0 0 0) fixed=true
    Marker R_tibial_plateau: tibia_r (0 0 0) fixed=true
    Marker L_tibial_plateau: tibia_l (0 0 0) fixed=true
  WrapCylinder Gmax1_at_pelvis_r: frame=pelvis xyz_body=pelvis translation=(0 0 0) radius=0 length=0
  WrapCylinder Gmax2_at_pelvis_r: frame=pelvis xyz_body=pelvis translation=(0 0 0) radius=0 length=0
  WrapCylinder Gmax3_at_pelvis_r: frame=pelvis xyz_body=pelvis translation=(0 0 0) radius=0 length=0
  WrapCylinder Gmax1_at_pelvis_l: frame=pelvis xyz_body=pelvis translation=(0 0 0) radius=0 length=0
  WrapCylinder Gmax2_at_pelvis_l: frame=pelvis xyz_body=pelvis translation=(0 0 0) radius=0 length=0
  WrapCylinder Gmax3_at_pelvis_l: frame=pelvis xyz_body=pelvis translation=(0 0 0) radius=0 length=0
  WrapCylinder PS_at_brim_r: frame=pelvis xyz_body=pelvis translation=(0 0 0) radius=0 length=0
  WrapCylinder PS_at_brim_l: frame=pelvis xyz_body=pelvis translation=(0 0 0) radius=0 length=0
  WrapCylinder IL_at_brim_r: frame=pelvis xyz_body=pelvis translation=(0 0 0) radius=0 length=0
  WrapCylinder IL_at_brim_l: frame=pelvis xyz_body=pelvis translation=(0 0 0) radius=0 length=0
  WrapCylinder Gastroc_at_condyles_r: frame=femur_r xyz_body=femur_r translation=(0 0 0) radius=0 length=0
  WrapCylinder KnExt_at_fem_r: frame=femur_r xyz_body=femur_r translation=(0 0 0) radius=0 length=0
  WrapCylinder AB_at_femshaft_r: frame=femur_r xyz_body=femur_r translation=(0 0 0) radius=0 length=0
  WrapCylinder AL_at_femshaft_r: frame=femur_r xyz_body=femur_r translation=(0 0 0) radius=0 length=0
  WrapCylinder AMprox_at_femshaft_r: frame=femur_r xyz_body=femur_r translation=(0 0 0) radius=0 length=0
  WrapCylinder AMmid_at_femshaft_r: frame=femur_r xyz_body=femur_r translation=(0 0 0) radius=0 length=0
  WrapCylinder AMdist_at_femshaft_r: frame=femur_r xyz_body=femur_r translation=(0 0 0) radius=0 length=0
  WrapCylinder AMisch_at_condyles_r: frame=femur_r xyz_body=femur_r translation=(0 0 0) radius=0 length=0
  WrapCylinder PECT_at_femshaft_r: frame=femur_r xyz_body=femur_r translation=(0 0 0) radius=0 length=0
  WrapCylinder GasLat_at_shank_r: frame=tibia_r xyz_body=tibia_r translation=(0 0 0) radius=0 length=0
  WrapCylinder GasMed_at_shank_r: frame=tibia_r xyz_body=tibia_r translation=(0 0 0) radius=0 length=0
  WrapCylinder GR_at_condyles_r: frame=tibia_r xyz_body=tibia_r translation=(0 0 0) radius=0 length=0
  WrapCylinder SM_at_condyles_r: frame=tibia_r xyz_body=tibia_r translation=(0 0 0) radius=0 length=0
  WrapCylinder ST_at_condyles_r: frame=tibia_r xyz_body=tibia_r translation=(0 0 0) radius=0 length=0
  WrapCylinder BF_at_gastroc_r: frame=tibia_r xyz_body=tibia_r translation=(0 0 0) radius=0 length=0
  WrapCylinder Gastroc_at_condyles_l: frame=femur_l xyz_body=femur_l translation=(0 0 0) radius=0 length=0
  WrapCylinder KnExt_at_fem_l: frame=femur_l xyz_body=femur_l translation=(0 0 0) radius=0 length=0
  WrapCylinder AB_at_femshaft_l: frame=femur_l xyz_body=femur_l translation=(0 0 0) radius=0 length=0
  WrapCylinder AL_at_femshaft_l: frame=femur_l xyz_body=femur_l translation=(0 0 0) radius=0 length=0
  WrapCylinder AMprox_at_femshaft_l: frame=femur_l xyz_body=femur_l translation=(0 0 0) radius=0 length=0
  WrapCylinder AMmid_at_femshaft_l: frame=femur_l xyz_body=femur_l translation=(0 0 0) radius=0 length=0
  WrapCylinder AMdist_at_femshaft_l: frame=femur_l xyz_body=femur_l translation=(0 0 0) radius=0 length=0
  WrapCylinder AMisch_at_condyles_l: frame=femur_l xyz_body=femur_l translation=(0 0 0) radius=0 length=0
  WrapCylinder PECT_at_femshaft_l: frame=femur_l xyz_body=femur_l translation=(0 0 0) radius=0 length=0
  WrapCylinder GasLat_at_shank_l: frame=tibia_l xyz_body=tibia_l translation=(0 0 0) radius=0 length=0
  WrapCylinder GasMed_at_shank_l: frame=tibia_l xyz_body=tibia_l translation=(0 0 0) radius=0 length=0
  WrapCylinder GR_at_condyles_l: frame=tibia_l xyz_body=tibia_l translation=(0 0 0) radius=0 length=0
  WrapCylinder SM_at_condyles_l: frame=tibia_l xyz_body=tibia_l translation=(0 0 0) radius=0 length=0
  WrapCylinder ST_at_condyles_l: frame=tibia_l xyz_body=tibia_l translation=(0 0 0) radius=0 length=0
  WrapCylinder BF_at_gastroc_l: frame=tibia_l xyz_body=tibia_l translation=(0 0 0) radius=0 length=0
